*Heading
** Job name: 30x30NonLocal Model name: axiNotched
** Generated by: Abaqus/CAE 2021
*Preprint, echo=NO, model=NO, history=NO, contact=NO
**
** PARTS
**
*Part, name=Part-1
*Node
      1,   4.40380573,   4.59619427
      2,           9.,          6.5
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*Element, type=CAX4T
  1,    1,   12,  447,  127
  2,   12,   13,  448,  447
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*Nset, nset=Set-34, generate
    1,  4651,     1
*Elset, elset=Set-34, generate
    1,  4500,     1
*Nset, nset=topBoundary1
   4,   5, 128, 129, 130, 131
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*Elset, elset=topBoundary1, generate
  930,  1800,    30
*Nset, nset=topBoundary2
  3,  4, 70, 71, 72, 73
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*Elset, elset=topBoundary2, generate
 871,  900,    1
** Section: Section-1
*Solid Section, elset=Set-34, material=Material-1
,
*End Part
**
**
** ASSEMBLY
**
*Assembly, name=Assembly
**
*Instance, name=Part-1-1, part=Part-1
*End Instance
**
*Nset, nset=Set-1, instance=Part-1-1
   5,   6, 157, 158, 159, 160
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*Elset, elset=Set-1, instance=Part-1-1, generate
 1771,  1800,     1
*Nset, nset=Set-2, instance=Part-1-1
   6,  10, 331, 332, 333, 334
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*Elset, elset=Set-2, instance=Part-1-1, generate
 3571,  3600,     1
*Nset, nset=Set-3, instance=Part-1-1
   9,  10, 360, 361, 362, 363
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*Elset, elset=Set-3, instance=Part-1-1, generate
 2701,  3571,    30
*Nset, nset=Set-4, instance=Part-1-1
   9,  11, 389, 390, 391, 392
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*Elset, elset=Set-4, instance=Part-1-1, generate
 3630,  4500,    30
*Nset, nset=Set-5, instance=Part-1-1
   4,   5, 128, 129, 130, 131
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*Elset, elset=Set-5, instance=Part-1-1, generate
  930,  1800,    30
*Nset, nset=Set-6, instance=Part-1-1
  3,  4, 70, 71, 72, 73
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*Elset, elset=Set-6, instance=Part-1-1, generate
 871,  900,    1
*Nset, nset=Set-7, instance=Part-1-1
   5,   6, 157, 158, 159, 160
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*Elset, elset=Set-7, instance=Part-1-1, generate
 1771,  1800,     1
*Nset, nset=Set-8, instance=Part-1-1
   6,  10, 331, 332, 333, 334
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*Elset, elset=Set-8, instance=Part-1-1, generate
 3571,  3600,     1
*Nset, nset=Set-9, instance=Part-1-1
   9,  10, 360, 361, 362, 363
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*Elset, elset=Set-9, instance=Part-1-1, generate
 2701,  3571,    30
*Nset, nset=Set-10, instance=Part-1-1
   9,  11, 389, 390, 391, 392
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*Elset, elset=Set-10, instance=Part-1-1, generate
 3630,  4500,    30
*Nset, nset=Set-11, instance=Part-1-1
   4,   5, 128, 129, 130, 131
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*Elset, elset=Set-11, instance=Part-1-1, generate
  930,  1800,    30
*Nset, nset=Set-12, instance=Part-1-1
  3,  4, 70, 71, 72, 73
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*Elset, elset=Set-12, instance=Part-1-1, generate
 871,  900,    1
*End Assembly
**
** MATERIALS
**
*Material, name=Material-1
*Conductivity
1.,
*Density
2700.,
*Depvar
     23,
*Heat Generation
*User Material, constants=7
 400480.0,      0.3, 345, 200, 1.25e+06,1.0, 0.6325
** ----------------------------------------------------------------
**
** STEP: Step-1
**
*Step, name=Step-1, nlgeom=YES, inc=20000
*Coupled Temperature-displacement, creep=none, steady state
0.01, 1., 1e-5, 0.01
**
** BOUNDARY CONDITIONS
**
** Name: BC-1 Type: Symmetry/Antisymmetry/Encastre
*Boundary
Set-7, XSYMM
** Name: BC-2 Type: Symmetry/Antisymmetry/Encastre
*Boundary
Set-8, XSYMM
** Name: BC-3 Type: Symmetry/Antisymmetry/Encastre
*Boundary
Set-9, YSYMM
** Name: BC-4 Type: Symmetry/Antisymmetry/Encastre
*Boundary
Set-10, YSYMM
** Name: BC-5 Type: Displacement/Rotation
*Boundary
Set-11, 2, 2, 3.
** Name: BC-6 Type: Displacement/Rotation
*Boundary
Set-12, 2, 2, 3.
**
** OUTPUT REQUESTS
**
*Restart, write, frequency=0
**
** FIELD OUTPUT: F-Output-2
**
*Output, field, frequency=1
*Node Output
NT,
*Element Output, directions=YES
SDV,
**
** FIELD OUTPUT: F-Output-1
**
*Output, field, variable=PRESELECT, frequency=1
**
** HISTORY OUTPUT: H-Output-2
**
*Output, history
*Node Output, nset=Part-1-1.topBoundary1
RF1, RF2, RF3, RT
**
** HISTORY OUTPUT: H-Output-3
**
*Node Output, nset=Part-1-1.topBoundary2
RF1, RF2, RF3, RT
**
** HISTORY OUTPUT: H-Output-1
**
*Output, history, variable=PRESELECT
*End Step
